*Heading
** Job name: Tensile Model name: Tensile
** Generated by: Abaqus/CAE 2017
*Preprint, echo=NO, model=NO, history=NO, contact=NO
**
** PARTS
**
*Part, name=Bar
*Node
      1,          50.,          10.,           1.
      2,          50.,           9.,           1.
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*Element, type=C3D8
  1,   34,   35,   13,   12,   23,   24,    2,    1
  2,   35,   36,   14,   13,   24,   25,    3,    2
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*Nset, nset=_PickedSet11, internal, generate
   11,  1111,    22
*Elset, elset=_PickedSet11, internal, generate
  10,  500,   10
*Nset, nset=Displacement, generate
  1,  22,   1
*Nset, nset=XFixed, generate
 1101,  1122,     1
*Nset, nset=YZFixed
 1117,
*Nset, nset=YFixed
 1106,
*Nset, nset=ZFixed, generate
 1112,  1122,     1
*Elset, elset=__PickedSurf10_S2, internal, generate
   1,  500,    1
*Surface, type=ELEMENT, name=_PickedSurf10, internal
__PickedSurf10_S2, S2
*Distribution, name=Ori-1-DiscOrient, location=ELEMENT, Table=Ori-1-DiscOrient_Table
** Description: Distribution generated from Discrete Orientation
,           1.,           0.,           0.,           0.,           1.,           0.
1,           1.,           0.,           0.,           0.,           1.,           0.
2,           1.,           0.,           0.,           0.,           1.,           0.
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500,           1.,           0.,           0.,           0.,           1.,           0.
*Orientation, name=Ori-1, system=RECTANGULAR
Ori-1-DiscOrient
3, 0.
** Region: (CompositeLayup-1-1: Generated From Layup)
*Elset, elset=CompositeLayup-1-1, generate
   1,  500,    1
** Section: CompositeLayup-1-1
*Solid Section, elset=CompositeLayup-1-1, composite, orientation=Ori-1, stack direction=3, layup=CompositeLayup-1
1., 1, UserMAT, 0., Ply-1
1., 1, UserMAT, 45., Ply-2
1., 1, UserMAT, -45., Ply-3
1., 1, UserMAT, 90., Ply-4
1., 1, UserMAT, 90., Ply-5
1., 1, UserMAT, -45., Ply-6
1., 1, UserMAT, 45., Ply-7
1., 1, UserMAT, 0., Ply-8
*End Part
**
**
** ASSEMBLY
**
*Assembly, name=Assembly
**
*Instance, name=Bar-1, part=Bar
*End Instance
**
*End Assembly
*Distribution Table, name=Ori-1-DiscOrient_Table
coord3D, coord3D
**
** MATERIALS
**
*Material, name=UserMAT
*Depvar
      4,
*User Material, constants=15
135000.,10000.,10000.,  0.25,  0.25,  0.45, 4300., 4300.
 3000., 2410., 1300.,   86.,  200.,  152.,  100.
** ----------------------------------------------------------------
**
** STEP: Load
**
*Step, name=Load, nlgeom=NO
*Static
1., 1., 1e-05, 1.
**
** BOUNDARY CONDITIONS
**
** Name: Displacement Type: Displacement/Rotation
*Boundary
Bar-1.Displacement, 1, 1, 0.5
** Name: XFixed Type: Displacement/Rotation
*Boundary
Bar-1.XFixed, 1, 1
** Name: YFixed Type: Displacement/Rotation
*Boundary
Bar-1.YFixed, 2, 2
** Name: YZFixed Type: Displacement/Rotation
*Boundary
Bar-1.YZFixed, 2, 2
Bar-1.YZFixed, 3, 3
** Name: ZFix Type: Displacement/Rotation
*Boundary
Bar-1.ZFixed, 3, 3
**
** OUTPUT REQUESTS
**
*Restart, write, frequency=0
**
** FIELD OUTPUT: F-Output-2
**
*Output, field
*Node Output
U,
*Element Output, directions=YES
E,
**
** FIELD OUTPUT: F-Output-1
**
*Element Output, elset=Bar-1.CompositeLayup-1-1, directions=YES
1, 2, 3, 4, 5, 6, 7, 8
S, SDV
**
** HISTORY OUTPUT: H-Output-1
**
*Output, history, variable=PRESELECT
*End Step
